# Вычисляем установленное значение периода таймера
K_prescaler := [1; 8; 64; 256]
PR2_set := 625
F_CY.set := 16*10^6
T_timer.set := PR2_set*K_prescaler/F_CY.set
T_timer.set = [3.90625e-5; 0.0003125; 0.0025; 0.01]
# Подбираем необходимое значение регистра PR2 для работы таймера с заданным периодом
T_timer := 10*10^-3
F_CY.new := 20*10^6
F_timer := 1/T_timer
PR2 := F_CY.new*T_timer/K_prescaler
PR2 = [200000; 25000; 3125; 781.25]
